<?xml version="1.0"?>
<Node name="root" gravity="0 0 0" dt="0.01" >
    <Node name="RequiredPlugins">
        <RequiredPlugin pluginName="Sofa.Component.Collision.Geometry"/> <!-- Needed to use components [LineCollisionModel,PointCollisionModel] -->
        <RequiredPlugin pluginName="Sofa.Component.Constraint.Lagrangian.Correction"/> <!-- Needed to use components [LinearSolverConstraintCorrection] -->
        <RequiredPlugin pluginName="Sofa.Component.IO.Mesh"/> <!-- Needed to use components [MeshOBJLoader] -->
        <RequiredPlugin pluginName="Sofa.Component.LinearSolver.Direct"/> <!-- Needed to use components [SparseLDLSolver] -->
        <RequiredPlugin pluginName="Sofa.Component.Mapping.NonLinear"/> <!-- Needed to use components [RigidMapping] -->
        <RequiredPlugin pluginName="Sofa.Component.Mass"/> <!-- Needed to use components [UniformMass] -->
        <RequiredPlugin pluginName="Sofa.Component.ODESolver.Backward"/> <!-- Needed to use components [EulerImplicitSolver] -->
        <RequiredPlugin pluginName="Sofa.Component.SceneUtility"/> <!-- Needed to use components [InfoComponent] -->
        <RequiredPlugin pluginName="Sofa.Component.SolidMechanics.Spring"/> <!-- Needed to use components [RestShapeSpringsForceField] -->
        <RequiredPlugin pluginName="Sofa.Component.StateContainer"/> <!-- Needed to use components [MechanicalObject] -->
        <RequiredPlugin pluginName="Sofa.Component.Topology.Container.Constant"/> <!-- Needed to use components [MeshTopology] -->
        <RequiredPlugin pluginName="Sofa.Component.Visual"/> <!-- Needed to use components [VisualStyle] -->
        <RequiredPlugin pluginName="Sofa.GL.Component.Rendering3D"/> <!-- Needed to use components [OglModel] -->
        <RequiredPlugin pluginName="SofaHaplyRobotics"/>
    </Node>

	<VisualStyle displayFlags="showVisualModels showBehaviorModels hideCollisionModels hideBoundingCollisionModels hideMappings hideMechanicalMappings hideForceFields hideInteractionForceFields hideWireframe hideNormals" />

    <DefaultAnimationLoop />
    <DefaultVisualManagerLoop />

    <Haply_Inverse3Controller name="Device" scale="100.0" drawDebug="1" printLog="0"/>
    <MechanicalObject template="Rigid3d" name="HaplyMO" position="@Device.positionDevice" />

	<Node name="Instrument" >
        <EulerImplicitSolver name="ODE solver" rayleighStiffness="0.0" rayleighMass="0.0" />
        <SparseLDLSolver template="CompressedRowSparseMatrixd"/>

		<MechanicalObject name="instrumentState" template="Rigid3" />
		<UniformMass name="mass" totalMass="1" />

		<RestShapeSpringsForceField stiffness='1e9' angularStiffness='1e9' external_rest_shape='@../HaplyMO' points='0' external_points='0'/>
        <LinearSolverConstraintCorrection />

        <Node name="VisuTool" >
            <MeshOBJLoader name="meshLoader_1" filename="./mesh/Stylus.obj" handleSeams="1"
                rotation="0 0 0" translation="0 0 0"/>
            <OglModel name="InstrumentVisualModel" src="@meshLoader_1" color="1.0 1.0 1.0 1.0" />
            <RigidMapping name="MM->VM mapping" input="@instrumentState" output="@InstrumentVisualModel" />
        </Node>

    </Node>

    <Node name="Inverse3Base">
        <MechanicalObject name="intrumentBase" template="Rigid3" position="@Device.origineDevice"/>

        <Node name="VisuTool" >
            <MeshOBJLoader name="meshLoader_1" filename="./mesh/Inverse3.obj" handleSeams="1"
                rotation="0 0 0" translation="0 0 0"/>
            <OglModel name="BaseVisualModel" src="@meshLoader_1" color="1.0 1.0 1.0 1.0" />
            <RigidMapping name="MM->VM mapping" input="@../instrumentBase" output="@BaseVisualModel" />
        </Node>
    </Node>
</Node>
